all
0.0                      Mach
0     0     0.0          iYsym  iZsym  Zsym
0.26125 0.8  0.85          Sref   Cref   Bref   reference area, chord, span
0 0   0          Xref   Yref   Zref   moment reference location (arb.)
0.020                    CDoref
#
#==============================================================
#
SURFACE
UAV
20  1.0  30  1.0  !  Nchord   Cspace   Nspan  Sspace
#
# reflect image wing about y=0 plane
YDUPLICATE
     0
#
# twist angle bias for whole surface
ANGLE
     0
#
# x,y,z bias for whole surface
TRANSLATE
    0     0     0
#--------------------------------------------------------------
#    Xle         Yle         Zle         chord       angle   Nspan  Sspace
SECTION
     0     0     0     0.8         0
CONTROL
elevator  1  0.6   0 1 0   1
AFIL
aerofoil1.txt
#-----------------------
#    Xle         Yle         Zle         chord       angle   Nspan  Sspace
SECTION
     0.5     0.3     0     0.3         0
CONTROL
elevator  1  0.6   0 1 0   1
AFIL
aerofoil2.txt
#-----------------------
#    Xle         Yle         Zle         chord       angle   Nspan  Sspace
SECTION
     0.75     0.85     0     0.05         0
CONTROL
elevator  1  0.6   0 1 0   1
AFIL
aerofoil3.txt
#-----------------------
